OpenVSP model (file version 5), 9 components.
Geometry view with OpenVSP parameter names; values to 6 digits, angles in degrees, lengths in the model's unit.
Overall bounding box: X_Min=-35 X_Len=53.3333 Y_Min=-27.6671 Y_Len=55.3342 Z_Min=-3.65209 Z_Len=7.2492

Wing "Main_Wing"
  location (X Y Z) -25 4.2623 -0.983607, rotation 0 0 0
  symmetric about XZ
  bounding box size 37.859 55.3342 1.63868
  totals: TotalSpan=46.8096 TotalProjectedSpan=46.8096 TotalChord=22.0721 TotalArea=1060.29 TotalAR=2.06654 MAC=25.2049
  root: chord 37.821, twist 0, airfoil file "SC(2)-0714 | Supercritical airfoil (coordinates from Raymer w/ one correction). These coordinates are actual model coordinates, not coordinates as designed. Ref: NASA TP-2890"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 BaseThickChord=0.139385 ThickChord=0.04
  sections:
    n  Span     Root_Chord  Tip_Chord  Area     Sweep  Sweep_Location  Dihedral  Twist  Twist_Location  tip airfoil
    1  3.52148  37.821      30.307     119.956  65     0               0         0      0.25            as above
    2  9.48076  30.307      22.2976    249.366  40     0               0         0      0.25            as above
    3  7.47865  22.2976     12.472     130.015  40     0               0         0      0.25            as above
    4  2.92394  12.472      8.60297    30.8109  40     0               0         0      0.25            as above
  SS_Control "Pitch_Control": UStart=0.196078 UEnd=0.397059 Length_C_Start=0.118056 Length_C_End=0.118056 Length_Start=3.59563 Length_End=2.6465 LE_Flag=0 Surf_Type=2
  SS_Control "SS_CONT_1": UStart=0.60381 UEnd=0.8 Length_C_Start=1 Length_C_End=1 Length_Start=12.3994 Length_End=8.60374 LE_Flag=0 Surf_Type=2

Fuselage "Fuselage"
  location (X Y Z) -35 0 0, rotation 0 0 0
  bounding box size 46.9374 12.1827 6.05211
  Design: Length=45
  cross sections:
    n  XLocPercent  YLocPercent  ZLocPercent  shape
    0  0            0            -0.02        point
    1  0.07064      0            -0.02        biconvex Chord=4.4449 ThickChord=0.382143
    2  0.242763     0            -0.02        biconvex Chord=8.85714 ThickChord=0.557143
    3  0.3125       0            -0.02        biconvex Chord=10 ThickChord=0.535714
    4  0.356557     0            -0.0133333   super ellipse Super_Height=6 Super_M=2.8 Super_MaxWidthLoc=-0.1 Super_N=0.8 Super_Width=10.8571
    5  0.428778     0            -0.0210902   super ellipse Super_Height=5.40575 Super_M=2.8 Super_MaxWidthLoc=0.0142857 Super_N=0.8 Super_Width=12
    6  1            0            -0.00888889  super ellipse Super_Height=3.8748 Super_M=2.8 Super_MaxWidthLoc=-0.257143 Super_N=0.8 Super_Width=12

Stack "Cockpit", child of "Fuselage"
  location (X Y Z) -29.0984 0 0.532954, rotation 0 -2.54918 0
  bounding box size 11.6605 3.3 4.66709
  cross sections:
    n  XDelta   YDelta  ZDelta  shape
    0  0        0       0       point
    1  4.5      0       0       ellipse Ellipse_Height=3.795 Ellipse_Width=3.3
    2  3        0       0       ellipse Ellipse_Height=3.97833 Ellipse_Width=3.22055
    3  3.98684  0       1.08    point

Human "HumanGeom", child of "Cockpit"
  location (X Y Z) -24.3174 0 0.156, rotation 0 30 0
  bounding box size 3.96396 2.09957 3.6371
  mass: Density=68.4985 Shell_Flag=0 Mass_Area=1 Mass_Prior=0
  Anthropometric: Age=30 AutoDensity=1 BMI=27.7 BMI_pct=0.5 GenderFlag=0 LenUnit=4 Mass=188.306 MassUnit=3 SitFrac=0.51 Stature=5.76115 Stature_pct=0.5 Volume=2.74905

Custom "Seat", child of "Cockpit"
  location (X Y Z) -25.5946 0 -1.85575, rotation 0 -64.5 0
  bounding box size 3.55592 1.81446 5.07848
  Design: BackAngle=0 BackHeight=3.20071 BackThick=0.1 SeatHeight=1.60039 SeatLength=1.57585 Width=1.81446
  custom script Seat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

Wing "Rudder_Wings"
  location (X Y Z) 5.12295 3.27869 0.522131, rotation 40 -1.5 -10
  symmetric about XZ
  bounding box size 9.65579 13.6744 4.11253
  totals: TotalSpan=9 TotalProjectedSpan=9 TotalChord=5 TotalArea=45 TotalAR=1.8 MAC=5.01667
  root: chord 5.5, twist 0, NACA 4-series Camber=0 CamberLoc=0.2 ThickChord=0.1
  sections:
    n  Span  Root_Chord  Tip_Chord  Area  Sweep  Sweep_Location  Dihedral  Twist  Twist_Location  tip airfoil
    1  4.5   5.5         4.5        22.5  45     0               0         0      0.25            as above
  SS_Control "SS_CONT_0": UStart=0.328431 UEnd=0.676471 Length_C_Start=0.375 Length_C_End=0.375 Length_Start=2.0625 Length_End=1.6875 LE_Flag=0 Surf_Type=2

Stack "F135"
  location (X Y Z) -8.75 3.5 -1, rotation 0 -3 0
  symmetric about XZ
  bounding box size 20.9362 10.83 4.91147
  cross sections:
    n  XDelta   YDelta  ZDelta  shape
    0  0        0       0       circle Circle_Diameter=3.83
    1  20.7642  0       0       as above

Stack "F135 Duct", child of "F135"
  location (X Y Z) -22.1135 -5.00017 -2.43004, rotation 0 0 0
  symmetric about XZ
  bounding box size 13.4957 15.7775 4.38624
  cross sections:
    n  XDelta   YDelta  YRotate  ZDelta   shape
    0  0        0       0        0        rounded rectangle RoundRectXSec_Radius=0.2 RoundRect_Keystone=0.58 RoundRect_Skew=-0.8 RoundRect_VSkew=-0.04 RoundedRect_Height=2 RoundedRect_Width=3.5
    1  2        0       0        0        rounded rectangle RoundRectXSec_Radius=0.2 RoundRect_Skew=-0.8 RoundRect_VSkew=-0.04 RoundedRect_Height=2 RoundedRect_Width=3.5
    2  5.5      1.5     -3       0        file fuselage section Height=2 Width=4
    3  4.82895  0       0        1.08197  circle Circle_Diameter=3.83
    4  1.13158  0       0        0        circle Circle_Diameter=3.82

Fuselage "F135_Size"
  location (X Y Z) 0 0 0, rotation 0 0 0
  bounding box size 18.3333 3.83333 3.83333
  Design: Length=18.3333
  cross sections:
    n  XLocPercent  YLocPercent  ZLocPercent  shape
    0  0            0            0            circle Circle_Diameter=3.83333
    1  1            0            0            as above
